import Sofa
import Sofa.Core
import os

meshPath = os.path.dirname(os.path.abspath(__file__))+'/mesh/'

plugins=["SofaPython3","ModelOrderReduction","STLIB",

         "Sofa.Component.Visual",
         "Sofa.Component.AnimationLoop",
         "Sofa.GL.Component.Rendering3D",
         "Sofa.Component.Constraint.Lagrangian.Solver",
         'Sofa.Component.IO.Mesh',
         'Sofa.Component.Playback',
         'Sofa.Component.Constraint.Lagrangian.Correction', # Needed to use components [GenericConstraintCorrection]
         'Sofa.Component.Engine.Select', # Needed to use components [BoxROI]
         'Sofa.Component.LinearSolver.Direct', # Needed to use components [SparseLDLSolver]
         'Sofa.Component.Mapping.Linear', # Needed to use components [BarycentricMapping]
         'Sofa.Component.Mass', # Needed to use components [UniformMass]
         'Sofa.Component.IntegrationSchemes.Backward', # Needed to use components [EulerImplicitIntegrationScheme]
         'Sofa.Component.SolidMechanics.FEM.Elastic', # Needed to use components [TetrahedronFEMForceField]
         'Sofa.Component.SolidMechanics.Spring', # Needed to use components [RestShapeSpringsForceField]
         'Sofa.Component.StateContainer', # Needed to use components [MechanicalObject]
         'Sofa.Component.Topology.Container.Dynamic', # Needed to use components [TetrahedronSetTopologyContainer]
         'Sofa.Component.Constraint.Projective', # Needed to use components [FixedProjectiveConstraint]
         'Sofa.Component.Topology.Container.Grid'] # Needed to use components [RegularGridTopology]


def createScene(rootNode):

    rootNode.addObject('RequiredPlugin', pluginName=plugins, printLog=False)
    rootNode.addObject('VisualStyle', displayFlags='showCollision showVisualModels showForceFields showInteractionForceFields hideCollisionModels hideBoundingCollisionModels hideWireframe')
    rootNode.findData('dt').value=0.01
    rootNode.findData('gravity').value=[0, -981, 0]
    surfaceColor=[0.7, 0.7, 0.7, 0.7]

    rootNode.addObject('DefaultAnimationLoop')

    liver = rootNode.addChild('liver')
    liver.addObject('EulerImplicitIntegrationScheme', rayleighStiffness = 0.0, rayleighMass = 0.0)
    liver.addObject('SparseLDLSolver',template="CompressedRowSparseMatrixMat3x3d")
    liver.addObject('MeshVTKLoader', name="loader", filename=meshPath+'liverFine.vtu')
    liver.addObject('TetrahedronSetTopologyContainer', src="@loader")
    liver.addObject('MechanicalObject')
    liver.addObject('BoxROI', name='ROI1', box='0 3 -1 2 5 2', drawBoxes='true')
    liver.addObject('BoxROI', name='boxROIactuation', box='-5 0 -0.5 -4 0.5 0.5', drawBoxes='true')

    liver.addObject('UniformMass', totalMass=0.3)
    liver.addObject('TetrahedronFEMForceField', poissonRatio="0.3", youngModulus="5000")
    liver.addObject('RestShapeSpringsForceField', points='@ROI1.indices', stiffness = '1e8')
    liver.addObject('RestShapeSpringsForceField' , external_points = [0, 1, 2, 3, 4, 5, 6, 7, 8, 9, 10], points = '@boxROIactuation.indices', name = 'actuatorSpring', stiffness = '1e8', external_rest_shape = '@actuator/actuatorState')

    visu = liver.addChild('visu')
    visu.addObject(  'MeshOBJLoader', name= 'loader', filename=meshPath+'liver-smoothUV.obj')
    visu.addObject('OglModel',src='@loader',  color=list(surfaceColor))
    visu.addObject('BarycentricMapping')


    # Add an actuator node compatible with "shakingLiver" animation function.
    actuator = rootNode.addChild('actuator')
    actuator.addObject('MechanicalObject', name = 'actuatorState', position = '@../liver/boxROIactuation.pointsInROI', template = 'Vec3d')
