# -*- coding: utf-8 -*-
import os
import Sofa

meshPath = os.path.dirname(os.path.abspath(__file__))+'/mesh/'

def createScene(rootNode):

    rootNode.findData('dt').value=0.02
    rootNode.findData('gravity').value=[0, -9810, 0]
    rootNode.addObject('VisualStyle', displayFlags='showBehaviorModels showForceFields')
    rootNode.addObject('RequiredPlugin', name='ModelOrderReduction')
    rootNode.addObject('RequiredPlugin', name='SoftRobots')
    rootNode.addObject('RequiredPlugin', name='Sofa.Component.AnimationLoop') # Needed to use components [FreeMotionAnimationLoop]
    rootNode.addObject('RequiredPlugin', name='Sofa.Component.Constraint.Lagrangian.Correction') # Needed to use components [GenericConstraintCorrection]
    rootNode.addObject('RequiredPlugin', name='Sofa.Component.Constraint.Lagrangian.Solver') # Needed to use components [GenericConstraintSolver]
    rootNode.addObject('RequiredPlugin', name='Sofa.Component.LinearSolver.Direct') # Needed to use components [SparseLDLSolver]
    rootNode.addObject('RequiredPlugin', name='Sofa.Component.Mapping.Linear') # Needed to use components [BarycentricMapping]
    rootNode.addObject('RequiredPlugin', name='Sofa.Component.Mass') # Needed to use components [UniformMass]
    rootNode.addObject('RequiredPlugin', name='Sofa.Component.IntegrationSchemes.Backward') # Needed to use components [EulerImplicitIntegrationScheme]
    rootNode.addObject('RequiredPlugin', name='Sofa.Component.SolidMechanics.FEM.Elastic') # Needed to use components [HexahedronFEMForceField]
    rootNode.addObject('RequiredPlugin', name='Sofa.Component.SolidMechanics.Spring') # Needed to use components [RestShapeSpringsForceField]
    rootNode.addObject('RequiredPlugin', name='Sofa.Component.StateContainer') # Needed to use components [MechanicalObject]
    rootNode.addObject('RequiredPlugin', name='Sofa.Component.Topology.Container.Grid') # Needed to use components [RegularGridTopology]
    rootNode.addObject('RequiredPlugin', name='Sofa.Component.Visual') # Needed to use components [VisualStyle]

    rootNode.addObject('FreeMotionAnimationLoop')
    rootNode.addObject('BlockGaussSeidelConstraintSolver', tolerance="1e-12", maxIterations="10000")


    M1 = rootNode.addChild("M1")
    M1.addObject('EulerImplicitIntegrationScheme',rayleighStiffness="0.1", rayleighMass="0.1")
    M1.addObject('SparseLDLSolver',name='preconditioner')
    M1.addObject('MechanicalObject')
    M1.addObject('UniformMass', totalMass="0.1")
    M1.addObject('RegularGridTopology', nx="4", ny="4", nz="20", xmin="-9", xmax="-6", ymin="0", ymax="3", zmin="0", zmax="19")
    M1.addObject('RestShapeSpringsForceField', points="0 1 2 3 4 5 6 7 8 9 10 11 12 13 14 15", stiffness=1e12)
    M1.addObject('HexahedronFEMForceField', name="FEM", youngModulus="4000", poissonRatio="0.3", method="large")
    M1.addObject('GenericConstraintCorrection')

    cableNodeTip = M1.addChild('cableNodeTip')
    cableNodeTip.addObject('MechanicalObject', name="actuatedTip", template="Vec3d", position="-7.5 1.5 18.5")
    cableNodeTip.addObject('CableConstraint', name="tipCable", indices="0", pullPoint="-7.5 10 18.5", valueType="displacement")
    cableNodeTip.addObject('BarycentricMapping', mapForces="false", mapMasses="false")

    cableNodeSide = M1.addChild('cableNodeSide')
    cableNodeSide.addObject('MechanicalObject', name="actuatedSide", template="Vec3d", position="-7.5 1.5 18.5")
    cableNodeSide.addObject('CableConstraint', name="sideCable", indices="0", pullPoint="1 10 18.5", valueType="displacement")
    cableNodeSide.addObject('BarycentricMapping', mapForces="false", mapMasses="false")
