import Sofa
import os

from numpy import add,subtract,multiply
from splib3.numerics import *

path = os.path.dirname(os.path.abspath(__file__))
meshPath = path + '/mesh/'

def TRSinOrigin(positions,modelPosition,translation,rotation,scale=[1.0,1.0,1.0]):
    posOrigin = subtract(positions , modelPosition)
    if any(isinstance(el, list) for el in positions):
        posOriginTRS = transformPositions(posOrigin,translation,scale=scale,eulerRotation=rotation)
    else:
        posOriginTRS = transformPosition(posOrigin,TRS_to_matrix(translation,eulerRotation=rotation,scale=scale))
    return add(posOriginTRS,modelPosition).tolist()

def newBox(positions,modelPosition,translation,rotation,offset,scale=[1.0,1.0,1.0]):
    pos = TRSinOrigin(positions,modelPosition,translation,rotation,scale)
    offset =transformPositions([offset],eulerRotation=rotation,scale=scale)[0]
    return add(pos,offset).tolist()


def SofiaLeg(
              attachedTo=None,
              name="SofiaLeg",
              volumeMeshFileName='sofia_leg.vtu',
              rotation=[0.0, 0.0, 0.0],
              translation=[0.0, 0.0, 0.0],
              scale=[1.0, 1.0, 1.0],
              surfaceMeshFileName='sofia_leg.stl',
              surfaceColor=[1.0, 1.0, 1.0],
              poissonRatio=0.45,
              youngModulus=300,
              totalMass=0.01,
              controller=''):
    """
    Object with an elastic deformation law.

    Args:

        attachedTo (Sofa.Node): Where the node is created;

        name (str) : name of the Sofa.Node it will

        surfaceMeshFileName (str): Filepath to a surface mesh (STL, OBJ).
                                   If missing there is no visual properties to this object.

        surfaceColor (vec3f):  The default color used for the rendering of the object.

        rotation (vec3f):   Apply a 3D rotation to the object in Euler angles.

        translation (vec3f):   Apply a 3D translation to the object.

        scale (vec3f): Apply a 3D scale to the object.

        poissonRatio (float):  The poisson parameter.

        youngModulus (float):  The young modulus.

        totalMass (float):   The mass is distributed according to the geometry of the object.
    """
    leg = attachedTo.addChild(name)
    leg.addObject('EulerImplicitIntegrationScheme' , firstOrder = '0', name = 'odesolver')
    leg.addObject('SparseLDLSolver' , name = 'preconditioner',template="CompressedRowSparseMatrixd")


    leg.addObject('MeshVTKLoader' ,name = 'loader', scale3d = scale, translation = translation, rotation = rotation, filename = meshPath+volumeMeshFileName)
    leg.addObject('TetrahedronSetTopologyContainer' ,name = 'container',  position = '@loader.position',tetrahedra = '@loader.tetrahedra', checkConnexity = '1', createTriangleArray = '1')
    leg.addObject('MechanicalObject' , name = 'tetras', showIndices = 'false', showIndicesScale = '4e-5', template = 'Vec3d', position = '@loader.position')
    leg.addObject('UniformMass' , totalMass = totalMass)
    leg.addObject('TetrahedronFEMForceField' , youngModulus = youngModulus, poissonRatio = poissonRatio) #,printLog=True)

    #To fix the Top part of the leg
    leg.addObject('BoxROI' , name= 'boxROITop' , orientedBox= newBox([[-12.0, 53.0, 0], [12.0, 53.0, 0], [12.0, 64.0, 0]] , [0.0, 0.0, 0.0],translation,rotation,[0, 0, 0.0],scale) + multiply(scale[2],[16.0]).tolist(),drawBoxes=True)
    leg.addObject('RestShapeSpringsForceField', name = 'fixedTopForceField', points = '@boxROITop.indices', stiffness = '1e8')

    #Box to add collisions only on the tip of the leg
    leg.addObject('BoxROI', name='boxROICollision', orientedBox= newBox(
                                                                    [[-25.0, -41.0, 0],[25.0, -42, 0],[25.0, -39, 0]], [0.0, 0.0, 0.0],
                                                                    translation,rotation,[0, 0, -7.0],scale) + multiply(scale[2],[2.0]).tolist()
                                                                +newBox(
                                                                    [[-25.0, -42, 0],[25.0, -42, 0],[25.0, -39, 0]], [0.0, 0.0, 0.0],
                                                                    translation,rotation,[0, 0, 7.0],scale) + multiply(scale[2],[2.0]).tolist(),
                                                    drawPoints='0', computeEdges='0',computeTriangles='0', computeTetrahedra='0',
                                                    computeHexahedra='0', computeQuad='0',drawSize=5, drawBoxes=True)

    #To Actuate our leg we select some elements in the middle of our leg, add a Spring to them, then add an external_rest_shape that will allow us
    leg.addObject('BoxROI' , name= 'boxROIMiddle' , orientedBox= newBox([[-2.5, -8.5, 0], [2.5, -8.5, 0], [2.5, -3.5, 0]] , [0.0, 0.0, 0.0],translation,rotation,[0, 0, 0.0],scale) + multiply(scale[2],[18.0]).tolist(),drawBoxes=True)
    leg.addObject('RestShapeSpringsForceField' , external_points =[i for i in range(3)], points = '@boxROIMiddle.indices', name = 'actuatorSpring', stiffness = '1e8', external_rest_shape = '@../'+name+'_actuator/actuatorState')

    SofiaLeg_actuator = attachedTo.addChild(name+'_actuator')
    SofiaLeg_actuator.addObject('MechanicalObject' , name = 'actuatorState', position = '@../'+name+'/boxROIMiddle.pointsInROI', template = 'Vec3d', showObject = True, showObjectScale=5)

    ## Visualization
    if surfaceMeshFileName:
        visu = leg.addChild('Visual')

        meshType = surfaceMeshFileName.split('.')[-1]
        if meshType == 'stl':
            visu.addObject(  'MeshSTLLoader', name= 'loader', filename=meshPath+surfaceMeshFileName, rotation= rotation, translation = translation,scale3d = scale)
        elif meshType == 'obj':
            visu.addObject(  'MeshOBJLoader', name= 'loader', filename=meshPath+surfaceMeshFileName, rotation= rotation, translation = translation,scale3d = scale)

        visu.addObject(  'OglModel',
                            src='@loader',
                            template='Vec3d',
                            color=surfaceColor)

        visu.addObject('BarycentricMapping')

    return leg

def createScene(rootNode):
    surfaceMeshFileName = 'sofia_leg.stl'

    rootNode.addObject('RequiredPlugin', pluginName='ModelOrderReduction')

    rootNode.addObject('VisualStyle', displayFlags='showVisualModels showBehaviorModels showCollisionModels hideBoundingCollisionModels showForceFields showInteractionForceFields hideWireframe');

    rootNode.findData('dt').value= 0.01;
    rootNode.findData('gravity').value= [0, -9810, 0];

    SofiaLeg(rootNode)


    return rootNode
