# -*- coding: utf-8 -*-
import sys
import numpy as np

#   STLIB IMPORT
try:
    from splib.animation import AnimationManager , animate
    from stlib.scene.wrapper import Wrapper
    from splib.scenegraph import *

except:
    raise ImportError("ModelOrderReduction plugin depend on SPLIB"\
                     +"Please install it : https://github.com/SofaDefrost/STLIB")

# MOR IMPORT
from mor.utility import sceneCreation as u
from mor.wrapper import replaceAndSave

# Our Phase1 Scene IMPORT
import phase1_snapshots

# Scene parameters
phase = []
#for $item in $PHASE
phase.append($item)
#end for
nbrOfModes = $NBROFMODES
periodSaveGIE = $PERIODSAVEGIE
nbTrainingSet = $NBTRAININGSET
paramWrapper = $PARAMWRAPPER
phaseToSave = $PHASETOSAVE

for item in paramWrapper:
    path, param = item
    param['nbrOfModes'] = $NBROFMODES
    if phase == phaseToSave:
        if 'paramMappedMatrixMapping' in param:
            param['paramMappedMatrixMapping']['saveReducedMass'] = True

###############################################################################

def createScene(rootNode):

    # Import Original Scene with the animation added
    # Here we use a wrapper (MORWrapper) that will allow us (with MORreplace)
    # to modify the initial scene and get informations on its structures
    # For more details on the process involved additionnal doc are with :
    #       - mor.wrapper.MORWrapper
    #       - mor.script.sceneCreationUtility

    phase1_snapshots.createScene(Wrapper(rootNode, replaceAndSave.MORreplace, paramWrapper))

    # Add MOR plugin if not found
    u.addPlugin(rootNode,"ModelOrderReduction")

    # Save connectivity list that will allow us after work only on the necessary elements

    if phase == phaseToSave:
        u.saveElements(rootNode,rootNode.dt,replaceAndSave.forcefield)

    # Modify the scene to perform hyper-reduction according
    # to the informations collected by the wrapper

    u.modifyGraphScene(rootNode,nbrOfModes,paramWrapper)


    # We Update the link
    for path , item in replaceAndSave.pathToUpdate.iteritems():
        data , newValue = item
        obj = get(rootNode,path)
        setattr(obj,data,newValue)
