import Sofa


def createScene(root):
    root.dt = 1
    root.gravity = [0,0,-9810]


    root.createObject( 'VisualStyle', template='', name="VisualStyle" , displayFlags="showVisual showBehavior hideCollision hideMapping hideOptions" )
    root.createObject( 'RequiredPlugin', template='', name="SofaPython" , printLog="1" , pluginName="SofaPython" )
    root.createObject( 'RequiredPlugin', template='', name="SoftRobots" , printLog="1" , pluginName="SoftRobots" )
    root.createObject( 'RequiredPlugin', template='', name="ModelOrderReduction" , printLog="1" , pluginName="ModelOrderReduction" )
    root.createObject( 'RequiredPlugin', template='', name="SofaMiscCollision" , printLog="1" , pluginName="SofaMiscCollision" )
    root.createObject( 'OglSceneFrame', template='', name="OglSceneFrame" , style="Arrows" , alignment="TopRight" )
    root.createObject( 'FreeMotionAnimationLoop', template='', name="FreeMotionAnimationLoop" )
    root.createObject( 'GenericConstraintSolver', template='', name="GenericConstraintSolver" , maxIterations="1000" , tolerance="1e-06" )
    root.createObject( 'DefaultVisualManagerLoop', template='', name="defaultVisualManagerLoop" )
    root.createObject( 'InteractiveCamera', template='', name="baseCamera" , listening="1" , zNear="1.63936" , zFar="52.5659" , minBBox="-15 -15 -40" , maxBBox="15 15 10" , projectionType="Perspective" , modelViewMatrix="1 0 0 -0 0 1 0 -0 0 0 1 -0 0 0 0 1" , projectionMatrix="1.81066 0 0 0 0 2.41421 0 0 0 0 -1.06438 -3.38426 0 0 -1 0" )


    modelNode_MOR_Node2 = root.createChild( 'modelNode_MOR' )
    modelNode_MOR_Node2.createObject( 'MechanicalObject', template='Vec1d', name="MechanicalObject" , position="0 0 0 0 0 0 0 0 0 0 0 0 0 0 0 0 0 0 0 0 0 0 0 0 0 0 0 0" , velocity="0 0 0 0 0 0 0 0 0 0 0 0 0 0 0 0 0 0 0 0 0 0 0 0 0 0 0 0" , force="0 0 0 0 0 0 0 0 0 0 0 0 0 0 0 0 0 0 0 0 0 0 0 0 0 0 0 0" , externalForce="0 0 0 0 0 0 0 0 0 0 0 0 0 0 0 0 0 0 0 0 0 0 0 0 0 0 0 0" , derivX="0 0 0 0 0 0 0 0 0 0 0 0 0 0 0 0 0 0 0 0 0 0 0 0 0 0 0 0" , rest_position="0 0 0 0 0 0 0 0 0 0 0 0 0 0 0 0 0 0 0 0 0 0 0 0 0 0 0 0" , reset_position="0 0 0 0 0 0 0 0 0 0 0 0 0 0 0 0 0 0 0 0 0 0 0 0 0 0 0 0" , size="28" )
    modelNode_MOR_Node2.createObject( 'EulerImplicitSolver', template='', name="EulerImplicit" )
    modelNode_MOR_Node2.createObject( 'SparseLDLSolver', template='CompressedRowSparseMatrix3f', name="Solver" )
    modelNode_MOR_Node2.createObject( 'GenericConstraintCorrection', template='', name="GenericConstraintCorrection" , solverName="Solver" )
    modelNode_MOR_Node2.createObject( 'MappedMatrixForceFieldAndMass', template='Vec1d,Vec1d', name="MappedMatrixForceFieldAndMass" , performECSW="1" , listActiveNodesPath="data/conectivity_modelNode.txt" , object1="@./MechanicalObject" , object2="@./MechanicalObject" , mappedForceField="@./modelNode/HyperReducedFEMForceField_modelNode" , mappedMass="@./modelNode/UniformMass" )


    modelNode_Node3 = modelNode_MOR_Node2.createChild( 'modelNode' )
    modelNode_Node3.createObject( 'MeshVTKLoader', template='', name="MeshLoader" , filename="/home/felix/SOFA/plugin/ModelOrderReduction/tools/sofa_test_scene/mesh/siliconeV0.vtu" , translation="0 0 35" , rotation="90 0 0" )
    modelNode_Node3.createObject( 'TetrahedronSetTopologyContainer', template='', name="container" , position="@MeshLoader.position" , nbPoints="1628" , points="0 1 2 3 4 5 6 7 8 9 10 11 12 13 14 15 16 17 18 19 20 21 22 23 24 25 26 27 28 29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" , edges="@MeshLoader.edges" , triangles="@MeshLoader.triangles" , tetrahedra="@MeshLoader.tetras" )
    modelNode_Node3.createObject( 'MechanicalObject', template='Vec3d', name="MechanicalObject" , position="13.1328 -41.7024 94.2669 1.14824 41.5768 73.1726 13.109 -42.042 94.1101 -7.62025 89.2887 43.1813 7.14891 40.4962 73.6422 -37.3846 -12.5647 75.8909 29.9924 13.9516 93.9353 -55.028 12.201 -22.0594 -10.6907 -76.6255 1.1906 75.4279 1.71983 -13.5748 11.9714 38.36 -6.2663 15.0414 -24.2023 -36.9452 -8.99569 -4.50947 112.347 -11.5086 13.3787 -36.956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" , velocity="0 0 0 0 0 0 0 0 0 0 0 0 0 0 0 0 0 0 0 0 0 0 0 0 0 0 0 0 0 0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" , force="0 0 0 0 0 0 0 0 0 0 0 0 0 0 0 0 0 0 0 0 0 0 0 0 0 0 0 0 0 0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" , externalForce="0 0 0 0 0 0 0 0 0 0 0 0 0 0 0 0 0 0 0 0 0 0 0 0 0 0 0 0 0 0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" , derivX="0 0 0 0 0 0 0 0 0 0 0 0 0 0 0 0 0 0 0 0 0 0 0 0 0 0 0 0 0 0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" , rest_position="13.1328 -41.7024 94.2669 1.14824 41.5768 73.1726 13.109 -42.042 94.1101 -7.62025 89.2887 43.1813 7.14891 40.4962 73.6422 -37.3846 -12.5647 75.8909 29.9924 13.9516 93.9353 -55.028 12.201 -22.0594 -10.6907 -76.6255 1.1906 75.4279 1.71983 -13.5748 11.9714 38.36 -6.2663 15.0414 -24.2023 -36.9452 -8.99569 -4.50947 112.347 -11.5086 13.3787 -36.956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" , size="1628" , topology="@container" )
    modelNode_Node3.createObject( 'UniformMass', template='Vec3d', name="UniformMass" , mass="0.000307125" , totalmass="0.5" , filename="unused" , indices="0 1 2 3 4 5 6 7 8 9 10 11 12 13 14 15 16 17 18 19 20 21 22 23 24 25 26 27 28 29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" )
    modelNode_Node3.createObject( 'HyperReducedTetrahedronFEMForceField', template='Vec3d', name="HyperReducedFEMForceField_modelNode" , initialPoints="13.1328 -41.7024 94.2669 1.14824 41.5768 73.1726 13.109 -42.042 94.1101 -7.62025 89.2887 43.1813 7.14891 40.4962 73.6422 -37.3846 -12.5647 75.8909 29.9924 13.9516 93.9353 -55.028 12.201 -22.0594 -10.6907 -76.6255 1.1906 75.4279 1.71983 -13.5748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" , method="large" , poissonRatio="0.45" , youngModulus="450" , gatherPt=" " , gatherBsize=" " , nbModes="28" , performECSW="1" , modesPath="data/test_modes.txt" , RIDPath="data/RID_modelNode.txt" , weightsPath="data/weight_modelNode.txt" )
    modelNode_Node3.createObject( 'ModelOrderReductionMapping', template='Vec1d,Vec3d', name="ModelOrderReductionMapping" , modesPath="data/test_modes.txt" , input="@../MechanicalObject" , output="@./MechanicalObject" )


    FixedBox_Node4 = modelNode_Node3.createChild( 'FixedBox' )
    FixedBox_Node4.createObject( 'BoxROI', template='Vec3d', name="BoxROI" , box="-15 -15 -40 15 15 10" , position="@/modelNode_MOR/modelNode/MechanicalObject.rest_position" , indices="13 15 33 77 121 125 207 213 247 257 375 381 405 438 463 482 490 642 682 694 695 701 705 721 776 811 812 894 895 896 928 949 977 982 991 992 1047 1083 1086 1096 1097 1121 1141 1174 1175 1262 1264 1273 1334 1335 1370 1397 1442 1443 1444 1456 1521 1595" , pointsInROI="-11.5086 13.3787 -36.956 10.4891 0.758372 -9.6245 13.1529 2.63245 -36.956 -3.92998 -2.90014 -25.2614 -10.417 -0.112557 -9.6245 1.44229 -14.0045 -36.956 7.00579 -12.6801 -9.6245 -0.733728 4.8034 -36.2423 -9.17656 -5.74604 -36.956 -0.157042 4.95792 -15.6845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" , nbIndices="58" , drawBoxes="1" , doUpdate="0" )
    FixedBox_Node4.createObject( 'RestShapeSpringsForceField', template='Vec3d', name="RestShapeSpringsForceField" , points="@BoxROI.indices" , stiffness="1e+12" )


    nord_Node5 = modelNode_Node3.createChild( 'nord' )
    nord_Node5.createObject( 'MechanicalObject', template='Vec3d', name="MechanicalObject" , position="-1.47105e-15 97 45" , velocity="0 0 0" , force="0 0 0" , externalForce="0 0 0" , derivX="0 0 0" , rest_position="0 97 45" , translation="0 0 0" , rotation="0 0 0" , scale3d="1 1 1" , size="1" )
    nord_Node5.createObject( 'CableConstraint', template='Vec3d', name="CableConstraint" , indices="0" , pullPoint="0 10 30" , hasPullPoint="1" , initialCableLength="88.2836" , cableLength="88.2836" , value="0" , valueType="displacement" )
    nord_Node5.createObject( 'BarycentricMapping', template='Vec3d,Vec3d', name="Mapping" , mapForces="0" , mapMasses="0" , input="@../" , output="@./" )


    ouest_Node6 = modelNode_Node3.createChild( 'ouest' )
    ouest_Node6.createObject( 'MechanicalObject', template='Vec3d', name="MechanicalObject" , position="-97 -6.66134e-16 45" , velocity="0 0 0" , force="0 0 0" , externalForce="0 0 0" , derivX="0 0 0" , rest_position="-97 0 45" , translation="0 0 0" , rotation="0 0 0" , scale3d="1 1 1" , size="1" )
    ouest_Node6.createObject( 'CableConstraint', template='Vec3d', name="CableConstraint" , indices="0" , pullPoint="-10 0 30" , hasPullPoint="1" , initialCableLength="88.2836" , cableLength="88.2836" , value="0" , valueType="displacement" )
    ouest_Node6.createObject( 'BarycentricMapping', template='Vec3d,Vec3d', name="Mapping" , mapForces="0" , mapMasses="0" , input="@../" , output="@./" )


    sud_Node7 = modelNode_Node3.createChild( 'sud' )
    sud_Node7.createObject( 'MechanicalObject', template='Vec3d', name="MechanicalObject" , position="3.81639e-17 -97 45" , velocity="0 0 0" , force="0 0 0" , externalForce="0 0 0" , derivX="0 0 0" , rest_position="0 -97 45" , translation="0 0 0" , rotation="0 0 0" , scale3d="1 1 1" , size="1" )
    sud_Node7.createObject( 'CableConstraint', template='Vec3d', name="CableConstraint" , indices="0" , pullPoint="0 -10 30" , hasPullPoint="1" , initialCableLength="88.2836" , cableLength="88.2836" , value="0" , valueType="displacement" )
    sud_Node7.createObject( 'BarycentricMapping', template='Vec3d,Vec3d', name="Mapping" , mapForces="0" , mapMasses="0" , input="@../" , output="@./" )


    est_Node8 = modelNode_Node3.createChild( 'est' )
    est_Node8.createObject( 'MechanicalObject', template='Vec3d', name="MechanicalObject" , position="97 3.33067e-16 45" , velocity="0 0 0" , force="0 0 0" , externalForce="0 0 0" , derivX="0 0 0" , rest_position="97 0 45" , translation="0 0 0" , rotation="0 0 0" , scale3d="1 1 1" , size="1" )
    est_Node8.createObject( 'CableConstraint', template='Vec3d', name="CableConstraint" , indices="0" , pullPoint="10 0 30" , hasPullPoint="1" , initialCableLength="88.2836" , cableLength="88.2836" , value="0" , valueType="displacement" )
    est_Node8.createObject( 'BarycentricMapping', template='Vec3d,Vec3d', name="Mapping" , mapForces="0" , mapMasses="0" , input="@../" , output="@./" )
