import Sofa
import os

meshPath = os.path.dirname(os.path.abspath(__file__))+'/mesh/'
# Units: cm, kg, s.     Pressure in kg/(cm.s^2) = 10*kg/(mm.s^2) = 10*k (kg/(m.s^2)) = 10*kPa

def createScene(rootNode):

    rootNode.createObject('RequiredPlugin', name='ModelOrderReduction', pluginName='ModelOrderReduction')
    rootNode.createObject('RequiredPlugin', name='SofaPython', pluginName='SofaPython')

    rootNode.createObject('VisualStyle', displayFlags='showCollision showVisualModels showForceFields showInteractionForceFields hideCollisionModels hideBoundingCollisionModels hideWireframe')
    rootNode.findData('dt').value=0.01
    rootNode.findData('gravity').value=[0, -981, 0]
    liver = rootNode.createChild('liver')
    liver.createObject('EulerImplicitSolver', rayleighStiffness = 0.0, rayleighMass = 0.0)
    liver.createObject('SparseLDLSolver', saveMatrixToFile='False')
    liver.createObject('MeshVTKLoader', name="loader", filename=meshPath+'liverFine.vtu')
    liver.createObject('TetrahedronSetTopologyContainer', src="@loader")
    liver.createObject('TetrahedronSetGeometryAlgorithms')
    liver.createObject('MechanicalObject')
    liver.createObject('BoxROI', name='ROI1', box='0 3 -1 2 5 2', drawBoxes='true')
    liver.createObject('BoxROI', name='boxROIactuation', box='-5 0 -0.5 -4 0.5 0.5', drawBoxes='true')
    liver.createObject('UniformMass', totalMass=0.3)
    #liver.createObject('TetrahedronFEMForceField', poissonRatio="0.3", youngModulus="5000")
    poissonRatio = 0.3
    youngModulus = 5000
    mu_ = youngModulus/(2*(1+poissonRatio))
    lambda_ = youngModulus*poissonRatio/((1-2*poissonRatio)*(1+poissonRatio))
    k0_ = youngModulus/(3*(1-2*poissonRatio))
    #liver.createObject('TetrahedronHyperelasticityFEMForceField',materialName="StVenantKirchhoff", ParameterSet=str(mu_) + " " + str(lambda_),AnisotropyDirections="",printLog=False)
    liver.createObject('TetrahedronHyperelasticityFEMForceField',materialName="NeoHookean", ParameterSet=str(mu_) + " " + str(k0_), AnisotropyDirections="")


    liver.createObject('RestShapeSpringsForceField', points='@ROI1.indices', stiffness = '1e8')
    liver.createObject('RestShapeSpringsForceField' , external_points = [0, 1, 2, 3, 4, 5, 6, 7, 8, 9, 10], points = '@boxROIactuation.indices', name = 'actuatorSpring', stiffness = '1e8', external_rest_shape = '@actuator/actuatorState')

    visu = liver.createChild('visu')
    visu.createObject(  'MeshObjLoader', name= 'loader', filename=meshPath+'liver-smoothUV.obj')
    visu.createObject('OglModel', src="@loader")
    visu.createObject('BarycentricMapping')


    actuator = rootNode.createChild('actuator')
    actuator.createObject('MechanicalObject', name = 'actuatorState', position = '@../liver/boxROIactuation.pointsInROI', template = 'Vec3d')
