import Sofa


def createScene(root):
    root.dt = 0.01
    root.gravity = [0,0,-9810]


    root.createObject( 'RequiredPlugin', template='', name="RequiredPlugin" , printLog="1" , pluginName="SofaPardisoSolver" )
    root.createObject( 'RequiredPlugin', template='', name="RequiredPlugin" , printLog="1" , pluginName="SoftRobots" )
    root.createObject( 'RequiredPlugin', template='', name="RequiredPlugin" , printLog="1" , pluginName="SofaPython" )
    root.createObject( 'RequiredPlugin', template='', name="RequiredPlugin" , printLog="1" , pluginName="ModelOrderReduction" )
    root.createObject( 'VisualStyle', template='', name="VisualStyle" , displayFlags="showVisual showBehavior hideCollision hideWireframe" )
    root.createObject( 'FreeMotionAnimationLoop', template='', name="FreeMotionAnimationLoop" )
    root.createObject( 'GenericConstraintSolver', template='', name="GenericConstraintSolver" , printLog="0" , maxIterations="5000" , tolerance="1e-15" )
    root.createObject( 'DefaultPipeline', template='', name="CollisionPipeline" , verbose="0" )
    root.createObject( 'BruteForceDetection', template='', name="N2" )
    root.createObject( 'DefaultContactManager', template='', name="CollisionResponse" , response="FrictionContact" , responseParams="mu=0.7" )
    root.createObject( 'LocalMinDistance', template='', name="Proximity" , alarmDistance="2.5" , contactDistance="0.5" , angleCone="0.01" )
    root.createObject( 'BackgroundSetting', template='', color="0 0.168627 0.211765 1" )
    root.createObject( 'OglSceneFrame', template='', name="OglSceneFrame" , style="Arrows" , alignment="TopRight" )
    root.createObject( 'DefaultVisualManagerLoop', template='', name="defaultVisualManagerLoop" )
    root.createObject( 'InteractiveCamera', template='', name="baseCamera" , listening="1" , zNear="21.214" , zFar="505.318" , minBBox="-300 -265 -1" , maxBBox="300 335 6.3" , projectionType="Perspective" , modelViewMatrix="1 0 0 -0 0 1 0 -0 0 0 1 -0 0 0 0 1" , projectionMatrix="1.81066 0 0 0 0 2.41421 0 0 0 0 -1.08764 -44.2872 0 0 -1 0" )


    Plane_Node2 = root.createChild( 'Plane' )
    Plane_Node2.createObject( 'MeshObjLoader', template='', name="loader" , filename="mesh/floorFlat.obj" , triangulate="1" )
    Plane_Node2.createObject( 'MeshTopology', template='', name="Mesh" , position="@loader.position" , edges="1 2 0 2 0 1 2 3 0 3" , triangles="@loader.triangles" , tetrahedra="@loader.tetras" , hexahedra="@loader.hexas" )
    Plane_Node2.createObject( 'MechanicalObject', template='Vec3d', name="MechanicalObject" , position="@loader.position" , velocity="0 0 0 0 0 0 0 0 0 0 0 0" , force="0 0 0 0 0 0 0 0 0 0 0 0" , externalForce="0 0 0 0 0 0 0 0 0 0 0 0" , derivX="0 0 0 0 0 0 0 0 0 0 0 0" , rest_position="-300 335 -1 -300 -265 -1 300 -265 -1 300 335 -1" , reset_position="-300 335 -1 -300 -265 -1 300 -265 -1 300 335 -1" , translation="0 35 -1" , rotation="90 0 0" , scale3d="15 15 15" , size="4" , topology="@Mesh" )
    Plane_Node2.createObject( 'TTriangleModel', template='Vec3d', name="Triangle" , moving="0" , simulated="0" , color="0.5 0.5 0.5 1" , group="1" )
    Plane_Node2.createObject( 'TLineModel', template='Vec3d', name="Line" , moving="0" , simulated="0" , color="0.5 0.5 0.5 1" , group="1" )
    Plane_Node2.createObject( 'TPointModel', template='Vec3d', name="Point" , moving="0" , simulated="0" , color="0.5 0.5 0.5 1" , group="1" )
    Plane_Node2.createObject( 'OglModel', template='ExtVec3f', name="Visual" , position="-300 335 -1 -300 -265 -1 300 -265 -1 300 335 -1" , normal="0 0 1 0 0 1 0 0 1 0 0 1" , texcoords="-2 -2 -2 2 2 2 2 -2" , quads="0 1 2 3" , fileMesh="mesh/floorFlat.obj" , translation="0 0 0" , rotation="0 0 0" , scale3d="1 1 1" , scaleTex="1 1" , translationTex="0 0" , material="Default Diffuse 1 1 0 0 1 Ambient 1 0.2 0 0 1 Specular 0 1 0 0 1 Emissive 0 1 0 0 1 Shininess 0 45 " , groups="Floor  defaultMaterial -1 0 0 0 1 0 0" , primitiveType="DEFAULT" , blendEquation="GL_FUNC_ADD" , sfactor="GL_SRC_ALPHA" , dfactor="GL_ONE_MINUS_SRC_ALPHA" )
    Plane_Node2.createObject( 'UncoupledConstraintCorrection', template='Vec3d', name="UncoupledConstraintCorrection" )


    model_MOR_Node3 = root.createChild( 'model_MOR' )
    model_MOR_Node3.createObject( 'MechanicalObject', template='Vec1d', name="MechanicalObject" , position="0 0 0 0 0 0 0 0 0 0 0 0 0 0 0 0 0 0 0 0 0 0 0 0 0 0 0 0 0 0 0 0 0 0 0 0 0 0 0 0 0 0 0 0 0 0 0 0 0 0 0 0 0 0 0 0 0 0 0 0 0 0 0 0 0 0 0 0 0 0 0 0 0 0 0 0 0 0" , velocity="0 0 0 0 0 0 0 0 0 0 0 0 0 0 0 0 0 0 0 0 0 0 0 0 0 0 0 0 0 0 0 0 0 0 0 0 0 0 0 0 0 0 0 0 0 0 0 0 0 0 0 0 0 0 0 0 0 0 0 0 0 0 0 0 0 0 0 0 0 0 0 0 0 0 0 0 0 0" , force="0 0 0 0 0 0 0 0 0 0 0 0 0 0 0 0 0 0 0 0 0 0 0 0 0 0 0 0 0 0 0 0 0 0 0 0 0 0 0 0 0 0 0 0 0 0 0 0 0 0 0 0 0 0 0 0 0 0 0 0 0 0 0 0 0 0 0 0 0 0 0 0 0 0 0 0 0 0" , externalForce="0 0 0 0 0 0 0 0 0 0 0 0 0 0 0 0 0 0 0 0 0 0 0 0 0 0 0 0 0 0 0 0 0 0 0 0 0 0 0 0 0 0 0 0 0 0 0 0 0 0 0 0 0 0 0 0 0 0 0 0 0 0 0 0 0 0 0 0 0 0 0 0 0 0 0 0 0 0" , derivX="0 0 0 0 0 0 0 0 0 0 0 0 0 0 0 0 0 0 0 0 0 0 0 0 0 0 0 0 0 0 0 0 0 0 0 0 0 0 0 0 0 0 0 0 0 0 0 0 0 0 0 0 0 0 0 0 0 0 0 0 0 0 0 0 0 0 0 0 0 0 0 0 0 0 0 0 0 0" , rest_position="0 0 0 0 0 0 0 0 0 0 0 0 0 0 0 0 0 0 0 0 0 0 0 0 0 0 0 0 0 0 0 0 0 0 0 0 0 0 0 0 0 0 0 0 0 0 0 0 0 0 0 0 0 0 0 0 0 0 0 0 0 0 0 0 0 0 0 0 0 0 0 0 0 0 0 0 0 0" , reset_position="0 0 0 0 0 0 0 0 0 0 0 0 0 0 0 0 0 0 0 0 0 0 0 0 0 0 0 0 0 0 0 0 0 0 0 0 0 0 0 0 0 0 0 0 0 0 0 0 0 0 0 0 0 0 0 0 0 0 0 0 0 0 0 0 0 0 0 0 0 0 0 0 0 0 0 0 0 0" , size="78" )
    model_MOR_Node3.createObject( 'EulerImplicitSolver', template='', name="odesolver" , rayleighStiffness="0.1" , rayleighMass="0.1" , firstOrder="0" )
    model_MOR_Node3.createObject( 'SparseLDLSolver', template='CompressedRowSparseMatrix3d', name="preconditioner" )
    model_MOR_Node3.createObject( 'GenericConstraintCorrection', template='', name="GenericConstraintCorrection" , solverName="preconditioner" )
    model_MOR_Node3.createObject( 'MappedMatrixForceFieldAndMass', template='Vec1d,Vec1d', name="MappedMatrixForceFieldAndMass" , performECSW="1" , listActiveNodesPath="data/conectivity_model.txt" , object1="@./MechanicalObject" , object2="@./MechanicalObject" , mappedForceField="@./model/HyperReducedFEMForceField_model" , mappedForceField2="@./model/modelSubTopo/HyperReducedFEMForceField_modelSubTopo" , mappedMass="@./model/UniformMass" )


    model_Node4 = model_MOR_Node3.createChild( 'model' )
    model_Node4.createObject( 'MeshVTKLoader', template='', name="loader" , filename="/home/felix/SOFA/plugin/ModelOrderReduction/tools/sofa_test_scene/mesh/full_quadriped_SMALL.vtk" )
    model_Node4.createObject( 'TetrahedronSetTopologyContainer', template='', name="container" , position="@loader.position" , nbPoints="2509" , points="0 1 2 3 4 5 6 7 8 9 10 11 12 13 14 15 16 17 18 19 20 21 22 23 24 25 26 27 28 29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" , triangles="@loader.triangles" , tetrahedra="@loader.tetrahedra" )
    model_Node4.createObject( 'TetrahedronSetTopologyModifier', template='', name="TetrahedronSetTopologyModifier" )
    model_Node4.createObject( 'TetrahedronSetTopologyAlgorithms', template='Vec3d', name="TetrahedronSetTopologyAlgorithms" )
    model_Node4.createObject( 'TetrahedronSetGeometryAlgorithms', template='Vec3d', name="TetrahedronSetGeometryAlgorithms" )
    model_Node4.createObject( 'MechanicalObject', template='Vec3d', name="tetras" , position="140.646 -24.4102 0 144.801 -35.8378 0 140.646 -24.4102 6.3 144.801 -35.8378 6.3 106.467 -53.6602 0 106.467 -53.6602 6.3 144.801 -71.4826 0 144.801 -71.4826 6.3 140.646 -82.9102 0 140.646 -82.9102 6.3 91.7416 -69.7774 0 91.7416 -69.7774 6.3 62.161 -69.7774 0 62.161 -69.7774 6.3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" , velocity="0 0 0 0 0 0 0 0 0 0 0 0 0 0 0 0 0 0 0 0 0 0 0 0 0 0 0 0 0 0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" , force="0 0 0 0 0 0 0 0 0 0 0 0 0 0 0 0 0 0 0 0 0 0 0 0 0 0 0 0 0 0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" , externalForce="0 0 0 0 0 0 0 0 0 0 0 0 0 0 0 0 0 0 0 0 0 0 0 0 0 0 0 0 0 0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" , derivX="0 0 0 0 0 0 0 0 0 0 0 0 0 0 0 0 0 0 0 0 0 0 0 0 0 0 0 0 0 0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" , rest_position="140.646 -24.4102 0 144.801 -35.8378 0 140.646 -24.4102 6.3 144.801 -35.8378 6.3 106.467 -53.6602 0 106.467 -53.6602 6.3 144.801 -71.4826 0 144.801 -71.4826 6.3 140.646 -82.9102 0 140.646 -82.9102 6.3 91.7416 -69.7774 0 91.7416 -69.7774 6.3 62.161 -69.7774 0 62.161 -69.7774 6.3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" , showIndices="0" , showIndicesScale="4e-05" , rotation="0 0 0" , size="2509" , topology="@container" )
    model_Node4.createObject( 'UniformMass', template='Vec3d', name="UniformMass" , mass="7.9713e-05" , totalmass="0.2" , filename="unused" , indices="0 1 2 3 4 5 6 7 8 9 10 11 12 13 14 15 16 17 18 19 20 21 22 23 24 25 26 27 28 29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" )
    model_Node4.createObject( 'HyperReducedTetrahedronFEMForceField', template='Vec3d', name="HyperReducedFEMForceField_model" , initialPoints="140.646 -24.4102 0 144.801 -35.8378 0 140.646 -24.4102 6.3 144.801 -35.8378 6.3 106.467 -53.6602 0 106.467 -53.6602 6.3 144.801 -71.4826 0 144.801 -71.4826 6.3 140.646 -82.9102 0 140.646 -82.9102 6.3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" , method="large" , poissonRatio="0.05" , youngModulus="70" , gatherPt=" " , gatherBsize=" " , nbModes="78" , performECSW="1" , modesPath="data/test_modes.txt" , RIDPath="data/RID_model.txt" , weightsPath="data/weight_model.txt" )
    model_Node4.createObject( 'BoxROI', template='Vec3d', name="boxROISubTopo" , box="0 -100 0 150 0 1" , position="@tetras.rest_position" , edges="@container.edges" , triangles="@container.triangles" , tetrahedra="@container.tetrahedra" , indices="0 1 4 6 8 10 12 14 16 18 20 22 24 26 80 81 82 83 84 85 86 87 88 89 90 91 92 93 94 95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" , triangleIndices="108 109 110 111 112 113 114 115 116 117 118 119 120 121 122 123 124 125 126 127 128 129 130 131 132 133 134 135 136 137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" , tetrahedronIndices="0 1 2 3 17 19 20 21 22 27 32 33 35 47 59 61 62 63 64 65 66 71 76 83 85 86 87 94 106 115 116 120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" , pointsInROI="140.646 -24.4102 0 144.801 -35.8378 0 106.467 -53.6602 0 144.801 -71.4826 0 140.646 -82.9102 0 91.7416 -69.7774 0 62.161 -69.7774 0 13.2568 -82.9102 0 9.10128 -71.4826 0 47.4357 -53.6602 0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" , trianglesInROI="962 958 6 948 1010 0 995 991 20 958 2423 957 2423 966 957 2423 958 965 966 2423 965 2411 2416 2418 2418 26 2411 2418 2416 2417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" , tetrahedraInROI="12 164 1214 1455 1569 977 1561 392 890 2307 2309 1010 2072 731 2071 965 2010 2147 2002 2415 1523 986 371 1513 915 953 2355 2353 2107 957 2120 752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" , nbIndices="982" , drawBoxes="1" , doUpdate="1" )
    model_Node4.createObject( 'BoxROI', template='Vec3d', name="membraneROISubTopo" , box="0 -100 -0.1 150 0 0.1" , position="@tetras.rest_position" , edges="@container.edges" , triangles="@container.triangles" , computeTetrahedra="0" , indices="0 1 4 6 8 10 12 14 16 18 20 22 24 26 948 952 953 957 958 962 965 966 967 972 975 976 977 982 985 986 990 991 995 998 999 1000 1005 1008 1009 1010 2410 2411 2412 2413 2414 2415 2416 2417 2418 2419 2420 2421 2422 2423" , triangleIndices="108 109 110 111 112 113 114 115 116 117 118 119 120 121 122 123 124 125 126 127 128 129 130 131 132 133 134 135 136 137 138 139 140 141 142 143 144 145 146 147 148 149 150 151 152 153 154 155 156 157 158 159 160 161 162 163 164 165 166 167 168 169 170 171 172 173" , pointsInROI="140.646 -24.4102 0 144.801 -35.8378 0 106.467 -53.6602 0 144.801 -71.4826 0 140.646 -82.9102 0 91.7416 -69.7774 0 62.161 -69.7774 0 13.2568 -82.9102 0 9.10128 -71.4826 0 47.4357 -53.6602 0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" , trianglesInROI="962 958 6 948 1010 0 995 991 20 958 2423 957 2423 966 957 2423 958 965 966 2423 965 2411 2416 2418 2418 26 2411 2418 2416 2417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" , nbIndices="54" , drawBoxes="1" , doUpdate="1" )
    model_Node4.createObject( 'ModelOrderReductionMapping', template='Vec1d,Vec3d', name="ModelOrderReductionMapping" , modesPath="data/test_modes.txt" , input="@../MechanicalObject" , output="@./tetras" )


    modelSubTopo_Node5 = model_Node4.createChild( 'modelSubTopo' )
    modelSubTopo_Node5.createObject( 'TriangleSetTopologyContainer', template='', name="container" , position="@loader.position" , nbPoints="2509" , points="0 1 2 3 4 5 6 7 8 9 10 11 12 13 14 15 16 17 18 19 20 21 22 23 24 25 26 27 28 29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" , triangles="@membraneROISubTopo.trianglesInROI" )
    modelSubTopo_Node5.createObject( 'HyperReducedTriangleFEMForceField', template='Vec3d', name="HyperReducedFEMForceField_modelSubTopo" , initialPoints="140.646 -24.4102 0 144.801 -35.8378 0 140.646 -24.4102 6.3 144.801 -35.8378 6.3 106.467 -53.6602 0 106.467 -53.6602 6.3 144.801 -71.4826 0 144.801 -71.4826 6.3 140.646 -82.9102 0 140.646 -82.9102 6.3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" , poissonRatio="0.49" , youngModulus="5000" , nbModes="78" , performECSW="1" , modesPath="data/test_modes.txt" , RIDPath="data/RID_modelSubTopo.txt" , weightsPath="data/weight_modelSubTopo.txt" )


    centerCavity_Node6 = model_Node4.createChild( 'centerCavity' )
    centerCavity_Node6.createObject( 'MeshSTLLoader', template='', name="loader" , filename="/home/felix/SOFA/plugin/ModelOrderReduction/tools/sofa_test_scene/mesh/quadriped_Center-cavityREMESHEDlighter.stl" )
    centerCavity_Node6.createObject( 'MeshTopology', template='', name="topo" , position="@loader.position" , edges="1 2 0 2 0 1 0 4 3 4 0 3 1 3 3 6 5 6 3 5 5 7 1 7 1 5 9 10 8 10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" , triangles="@loader.triangles" , tetrahedra="@loader.tetras" , hexahedra="@loader.hexas" )
    centerCavity_Node6.createObject( 'MechanicalObject', template='Vec3d', name="centerCavity" , position="83.5013 -53.6602 2 82.0513 -54.4102 2 83.5013 -54.4102 2 82.0513 -52.9102 2 83.5013 -52.9102 2 80.6013 -53.6602 2 80.6013 -52.9102 2 80.6013 -54.4102 2 99.4513 -54.4102 2 97.6013 -53.6602 2 97.6013 -54.4102 2 101.301 -53.6602 2 101.301 -54.4102 2 99.4513 -52.9102 2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" , velocity="0 0 0 0 0 0 0 0 0 0 0 0 0 0 0 0 0 0 0 0 0 0 0 0 0 0 0 0 0 0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" , force="0 0 0 0 0 0 0 0 0 0 0 0 0 0 0 0 0 0 0 0 0 0 0 0 0 0 0 0 0 0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" , externalForce="0 0 0 0 0 0 0 0 0 0 0 0 0 0 0 0 0 0 0 0 0 0 0 0 0 0 0 0 0 0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" , derivX="0 0 0 0 0 0 0 0 0 0 0 0 0 0 0 0 0 0 0 0 0 0 0 0 0 0 0 0 0 0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" , rest_position="83.5013 -53.6602 2 82.0513 -54.4102 2 83.5013 -54.4102 2 82.0513 -52.9102 2 83.5013 -52.9102 2 80.6013 -53.6602 2 80.6013 -52.9102 2 80.6013 -54.4102 2 99.4513 -54.4102 2 97.6013 -53.6602 2 97.6013 -54.4102 2 101.301 -53.6602 2 101.301 -54.4102 2 99.4513 -52.9102 2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" , size="587" , topology="@topo" )
    centerCavity_Node6.createObject( 'SurfacePressureConstraint', template='Vec3d', name="SurfacePressureConstraint" , triangles="@topo.triangles" , initialCavityVolume="507.1" , cavityVolume="507.1" , showVisuScale="0.0002" , value="0" , valueType="volumeGrowth" , visualization="0" )
    centerCavity_Node6.createObject( 'BarycentricMapping', template='Vec3d,Vec3d', name="mapping" , mapForces="0" , mapMasses="0" , input="@../" , output="@./" )


    rearLeftCavity_Node7 = model_Node4.createChild( 'rearLeftCavity' )
    rearLeftCavity_Node7.createObject( 'MeshSTLLoader', template='', name="loader" , filename="/home/felix/SOFA/plugin/ModelOrderReduction/tools/sofa_test_scene/mesh/quadriped_Rear-Left-cavity_collis.stl" )
    rearLeftCavity_Node7.createObject( 'MeshTopology', template='', name="topo" , position="@loader.position" , edges="1 2 0 2 0 1 4 5 3 5 3 4 0 6 4 6 0 4 1 4 3 7 1 7 1 3 9 10 8 10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" , triangles="@loader.triangles" , tetrahedra="@loader.tetras" , hexahedra="@loader.hexas" )
    rearLeftCavity_Node7.createObject( 'MechanicalObject', template='Vec3d', name="rearLeftCavity" , position="138.84 -76.3164 1.5 137.454 -75.8123 1 138.84 -76.3164 1 136.068 -75.3083 1.5 137.454 -75.8123 2 136.068 -75.3083 2 138.84 -76.3164 2 136.068 -75.3083 1 134.212 -74.6333 2 135.598 -75.1374 1.5 135.598 -75.1374 2 134.212 -74.6333 1 132.826 -74.1293 1.5 132.826 -74.1293 1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" , velocity="0 0 0 0 0 0 0 0 0 0 0 0 0 0 0 0 0 0 0 0 0 0 0 0 0 0 0 0 0 0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" , force="0 0 0 0 0 0 0 0 0 0 0 0 0 0 0 0 0 0 0 0 0 0 0 0 0 0 0 0 0 0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" , externalForce="0 0 0 0 0 0 0 0 0 0 0 0 0 0 0 0 0 0 0 0 0 0 0 0 0 0 0 0 0 0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" , derivX="0 0 0 0 0 0 0 0 0 0 0 0 0 0 0 0 0 0 0 0 0 0 0 0 0 0 0 0 0 0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" , rest_position="138.84 -76.3164 1.5 137.454 -75.8123 1 138.84 -76.3164 1 136.068 -75.3083 1.5 137.454 -75.8123 2 136.068 -75.3083 2 138.84 -76.3164 2 136.068 -75.3083 1 134.212 -74.6333 2 135.598 -75.1374 1.5 135.598 -75.1374 2 134.212 -74.6333 1 132.826 -74.1293 1.5 132.826 -74.1293 1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" , size="498" , topology="@topo" )
    rearLeftCavity_Node7.createObject( 'SurfacePressureConstraint', template='Vec3d', name="SurfacePressureConstraint" , triangles="@topo.triangles" , initialCavityVolume="280.291" , cavityVolume="280.291" , showVisuScale="0.0002" , value="0" , valueType="volumeGrowth" , visualization="0" )
    rearLeftCavity_Node7.createObject( 'BarycentricMapping', template='Vec3d,Vec3d', name="mapping" , mapForces="0" , mapMasses="0" , input="@../" , output="@./" )


    rearRightCavity_Node8 = model_Node4.createChild( 'rearRightCavity' )
    rearRightCavity_Node8.createObject( 'MeshSTLLoader', template='', name="loader" , filename="/home/felix/SOFA/plugin/ModelOrderReduction/tools/sofa_test_scene/mesh/quadriped_Rear-Right-cavity_collis.stl" )
    rearRightCavity_Node8.createObject( 'MeshTopology', template='', name="topo" , position="@loader.position" , edges="1 2 0 2 0 1 3 4 1 4 1 3 0 6 5 6 0 5 1 5 5 7 3 7 3 5 9 10 8 10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" , triangles="@loader.triangles" , tetrahedra="@loader.tetras" , hexahedra="@loader.hexas" )
    rearRightCavity_Node8.createObject( 'MechanicalObject', template='Vec3d', name="rearRightCavity" , position="139.011 -31.4739 2 137.796 -32.4479 2 139.182 -31.9438 2 136.239 -32.482 2 136.41 -32.9519 2 137.454 -31.5081 2 138.84 -31.004 2 136.068 -32.0121 2 135.769 -32.6529 2 134.554 -33.6269 2 135.94 -33.1228 2 132.997 -33.6611 2 133.168 -34.131 2 134.212 -32.6871 2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" , velocity="0 0 0 0 0 0 0 0 0 0 0 0 0 0 0 0 0 0 0 0 0 0 0 0 0 0 0 0 0 0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" , force="0 0 0 0 0 0 0 0 0 0 0 0 0 0 0 0 0 0 0 0 0 0 0 0 0 0 0 0 0 0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" , externalForce="0 0 0 0 0 0 0 0 0 0 0 0 0 0 0 0 0 0 0 0 0 0 0 0 0 0 0 0 0 0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" , derivX="0 0 0 0 0 0 0 0 0 0 0 0 0 0 0 0 0 0 0 0 0 0 0 0 0 0 0 0 0 0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" , rest_position="139.011 -31.4739 2 137.796 -32.4479 2 139.182 -31.9438 2 136.239 -32.482 2 136.41 -32.9519 2 137.454 -31.5081 2 138.84 -31.004 2 136.068 -32.0121 2 135.769 -32.6529 2 134.554 -33.6269 2 135.94 -33.1228 2 132.997 -33.6611 2 133.168 -34.131 2 134.212 -32.6871 2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" , size="498" , topology="@topo" )
    rearRightCavity_Node8.createObject( 'SurfacePressureConstraint', template='Vec3d', name="SurfacePressureConstraint" , triangles="@topo.triangles" , initialCavityVolume="280.295" , cavityVolume="280.295" , showVisuScale="0.0002" , value="0" , valueType="volumeGrowth" , visualization="0" )
    rearRightCavity_Node8.createObject( 'BarycentricMapping', template='Vec3d,Vec3d', name="mapping" , mapForces="0" , mapMasses="0" , input="@../" , output="@./" )


    frontLeftCavity_Node9 = model_Node4.createChild( 'frontLeftCavity' )
    frontLeftCavity_Node9.createObject( 'MeshSTLLoader', template='', name="loader" , filename="/home/felix/SOFA/plugin/ModelOrderReduction/tools/sofa_test_scene/mesh/quadriped_Front-Left-cavity_collis.stl" )
    frontLeftCavity_Node9.createObject( 'MeshTopology', template='', name="topo" , position="@loader.position" , edges="1 2 0 2 0 1 3 4 1 4 1 3 5 6 3 6 3 5 1 5 0 7 5 7 0 5 9 10 8 10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" , triangles="@loader.triangles" , tetrahedra="@loader.tetras" , hexahedra="@loader.hexas" )
    frontLeftCavity_Node9.createObject( 'MechanicalObject', template='Vec3d', name="frontLeftCavity" , position="47.485 -64.5263 1.5 48.4247 -64.1845 2 47.485 -64.5263 2 49.3645 -63.8428 1.5 49.3645 -63.8428 2 48.4247 -64.1845 1 49.3645 -63.8428 1 47.485 -64.5263 1 44.2427 -65.7053 1.5 45.6289 -65.2012 2 44.2427 -65.7053 2 47.0151 -64.6972 1.5 45.6289 -65.2012 1 47.0151 -64.6972 1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" , velocity="0 0 0 0 0 0 0 0 0 0 0 0 0 0 0 0 0 0 0 0 0 0 0 0 0 0 0 0 0 0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" , force="0 0 0 0 0 0 0 0 0 0 0 0 0 0 0 0 0 0 0 0 0 0 0 0 0 0 0 0 0 0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" , externalForce="0 0 0 0 0 0 0 0 0 0 0 0 0 0 0 0 0 0 0 0 0 0 0 0 0 0 0 0 0 0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" , derivX="0 0 0 0 0 0 0 0 0 0 0 0 0 0 0 0 0 0 0 0 0 0 0 0 0 0 0 0 0 0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" , rest_position="47.485 -64.5263 1.5 48.4247 -64.1845 2 47.485 -64.5263 2 49.3645 -63.8428 1.5 49.3645 -63.8428 2 48.4247 -64.1845 1 49.3645 -63.8428 1 47.485 -64.5263 1 44.2427 -65.7053 1.5 45.6289 -65.2012 2 44.2427 -65.7053 2 47.0151 -64.6972 1.5 45.6289 -65.2012 1 47.0151 -64.6972 1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" , size="502" , topology="@topo" )
    frontLeftCavity_Node9.createObject( 'SurfacePressureConstraint', template='Vec3d', name="SurfacePressureConstraint" , triangles="@topo.triangles" , initialCavityVolume="350.016" , cavityVolume="350.016" , showVisuScale="0.0002" , value="0" , valueType="volumeGrowth" , visualization="0" )
    frontLeftCavity_Node9.createObject( 'BarycentricMapping', template='Vec3d,Vec3d', name="mapping" , mapForces="0" , mapMasses="0" , input="@../" , output="@./" )


    frontRightCavity_Node10 = model_Node4.createChild( 'frontRightCavity' )
    frontRightCavity_Node10.createObject( 'MeshSTLLoader', template='', name="loader" , filename="/home/felix/SOFA/plugin/ModelOrderReduction/tools/sofa_test_scene/mesh/quadriped_Front-Right-cavity_collis.stl" )
    frontRightCavity_Node10.createObject( 'MeshTopology', template='', name="topo" , position="@loader.position" , edges="1 2 0 2 0 1 4 5 3 5 3 4 0 6 4 6 0 4 1 4 3 7 1 7 1 3 9 10 8 10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" , triangles="@loader.triangles" , tetrahedra="@loader.tetras" , hexahedra="@loader.hexas" )
    frontRightCavity_Node10.createObject( 'MechanicalObject', template='Vec3d', name="frontRightCavity" , position="47.1432 -43.7339 1.5 48.7879 -44.332 2 47.1432 -43.7339 2 50.4325 -44.93 1.5 48.7879 -44.332 1 50.4325 -44.93 1 47.1432 -43.7339 1 50.4325 -44.93 2 43.9009 -42.5549 1.5 45.2871 -43.059 2 43.9009 -42.5549 2 46.6733 -43.5631 1.5 45.2871 -43.059 1 46.6733 -43.5631 1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" , velocity="0 0 0 0 0 0 0 0 0 0 0 0 0 0 0 0 0 0 0 0 0 0 0 0 0 0 0 0 0 0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" , force="0 0 0 0 0 0 0 0 0 0 0 0 0 0 0 0 0 0 0 0 0 0 0 0 0 0 0 0 0 0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" , externalForce="0 0 0 0 0 0 0 0 0 0 0 0 0 0 0 0 0 0 0 0 0 0 0 0 0 0 0 0 0 0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" , derivX="0 0 0 0 0 0 0 0 0 0 0 0 0 0 0 0 0 0 0 0 0 0 0 0 0 0 0 0 0 0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" , rest_position="47.1432 -43.7339 1.5 48.7879 -44.332 2 47.1432 -43.7339 2 50.4325 -44.93 1.5 48.7879 -44.332 1 50.4325 -44.93 1 47.1432 -43.7339 1 50.4325 -44.93 2 43.9009 -42.5549 1.5 45.2871 -43.059 2 43.9009 -42.5549 2 46.6733 -43.5631 1.5 45.2871 -43.059 1 46.6733 -43.5631 1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" , size="504" , topology="@topo" )
    frontRightCavity_Node10.createObject( 'SurfacePressureConstraint', template='Vec3d', name="SurfacePressureConstraint" , triangles="@topo.triangles" , initialCavityVolume="350.015" , cavityVolume="350.015" , showVisuScale="0.0002" , value="0" , valueType="volumeGrowth" , visualization="0" )
    frontRightCavity_Node10.createObject( 'BarycentricMapping', template='Vec3d,Vec3d', name="mapping" , mapForces="0" , mapMasses="0" , input="@../" , output="@./" )


    modelCollis_Node11 = model_Node4.createChild( 'modelCollis' )
    modelCollis_Node11.createObject( 'MeshSTLLoader', template='', name="loader" , filename="/home/felix/SOFA/plugin/ModelOrderReduction/tools/sofa_test_scene/mesh/quadriped_collision.stl" , translation="0 0 0" , rotation="0 0 0" )
    modelCollis_Node11.createObject( 'TriangleSetTopologyContainer', template='', name="container" , position="@loader.position" , nbPoints="123" , points="0 1 2 3 4 5 6 7 8 9 10 11 12 13 14 15 16 17 18 19 20 21 22 23 24 25 26 27 28 29 30 31 32 33 34 35 36 37 38 39 40 41 42 43 44 45 46 47 48 49 50 51 52 53 54 55 56 57 58 59 60 61 62 63 64 65 66 67 68 69 70 71 72 73 74 75 76 77 78 79 80 81 82 83 84 85 86 87 88 89 90 91 92 93 94 95 96 97 98 99 100 101 102 103 104 105 106 107 108 109 110 111 112 113 114 115 116 117 118 119 120 121 122" , edges="@loader.edges" , triangles="@loader.triangles" )
    modelCollis_Node11.createObject( 'MechanicalObject', template='Vec3d', name="collisMO" , position="140.646 -24.4102 3.15 142.724 -30.124 0 140.646 -24.4102 -1.30538e-16 144.801 -35.8378 3.15 144.801 -35.8378 0 142.724 -30.124 6.3 144.801 -35.8378 6.3 140.646 -24.4102 6.3 132.023 -41.7786 0 119.245 -47.7194 6.3 119.245 -47.7194 0 132.023 -41.7786 6.3 106.467 -53.6602 3.15 106.467 -53.6602 6.3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" , velocity="0 0 0 0 0 0 0 0 0 0 0 0 0 0 0 0 0 0 0 0 0 0 0 0 0 0 0 0 0 0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" , force="0 0 0 0 0 0 0 0 0 0 0 0 0 0 0 0 0 0 0 0 0 0 0 0 0 0 0 0 0 0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" , externalForce="0 0 0 0 0 0 0 0 0 0 0 0 0 0 0 0 0 0 0 0 0 0 0 0 0 0 0 0 0 0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" , derivX="0 0 0 0 0 0 0 0 0 0 0 0 0 0 0 0 0 0 0 0 0 0 0 0 0 0 0 0 0 0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" , rest_position="140.646 -24.4102 3.15 142.724 -30.124 0 140.646 -24.4102 0 144.801 -35.8378 3.15 144.801 -35.8378 0 142.724 -30.124 6.3 144.801 -35.8378 6.3 140.646 -24.4102 6.3 132.023 -41.7786 0 119.245 -47.7194 6.3 119.245 -47.7194 0 132.023 -41.7786 6.3 106.467 -53.6602 3.15 106.467 -53.6602 6.3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" , size="123" , topology="@container" )
    modelCollis_Node11.createObject( 'TTriangleModel', template='Vec3d', name="Triangle" , color="1 0.5 0 1" , group="0" )
    modelCollis_Node11.createObject( 'TLineModel', template='Vec3d', name="Line" , color="1 0.5 0 1" , group="0" )
    modelCollis_Node11.createObject( 'TPointModel', template='Vec3d', name="Point" , color="1 0.5 0 1" , group="0" )
    modelCollis_Node11.createObject( 'BarycentricMapping', template='Vec3d,Vec3d', name="BarycentricMapping" , input="@../" , output="@./" )


    visu_Node12 = model_Node4.createChild( 'visu' )
    visu_Node12.createObject( 'OglModel', template='ExtVec3f', name="OglModel" , position="140.646 -24.4102 3.15 142.724 -30.124 0 140.646 -24.4102 1.249e-16 144.801 -35.8378 3.15 144.801 -35.8378 0 142.724 -30.124 6.3 144.801 -35.8378 6.3 140.646 -24.4102 6.3 132.023 -41.7786 0 119.245 -47.7194 6.3 119.245 -47.7194 0 132.023 -41.7786 6.3 106.467 -53.6602 3.15 106.467 -53.6602 6.3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" , normal="0.167523 0.985868 0 0.289603 0.105298 -0.951337 0.0857699 0.504753 -0.858993 0.736599 -0.67633 0 0.371442 -0.34105 -0.863548 0.289603 0.105298 0.951337 0.371442 -0.34105 0.863548 0.0857699 0.504753 0.858993 0.228158 -0.490743 -0.840901 0.212748 -0.457597 0.863333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" , texcoords="0 0 0 0 0 0 0 0 0 0 0 0 0 0 0 0 0 0 0 0 0 0 0 0 0 0 0 0 0 0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" , triangles="0 1 2 1 3 4 3 5 6 5 3 1 5 0 7 1 0 5 8 9 10 11 9 8 11 3 6 12 9 13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" , fileMesh="/home/felix/SOFA/plugin/ModelOrderReduction/tools/sofa_test_scene/mesh/quadriped_collision.stl" , translation="0 0 0" , rotation="0 0 0" , scale3d="1 1 1" , scaleTex="1 1" , translationTex="0 0" , material="Default Diffuse 1 0.7 0.7 0.7 0.6 Ambient 1 0.14 0.14 0.14 0.6 Specular 0 0.7 0.7 0.7 0.6 Emissive 0 0.7 0.7 0.7 0.6 Shininess 0 45 " , primitiveType="DEFAULT" , blendEquation="GL_FUNC_ADD" , sfactor="GL_SRC_ALPHA" , dfactor="GL_ONE_MINUS_SRC_ALPHA" )
    visu_Node12.createObject( 'BarycentricMapping', template='Vec3d,ExtVec3f', name="BarycentricMapping" , mapForces="0" , mapConstraints="0" , mapMasses="0" , input="@../" , output="@./" )
